# Worksheet setting: ORIGIN = 1
i := 1 .. n
nint := 1
n := 3*nint
j := 1 .. n
n = 3
# k is the variable on which one is conditioning
mx :=
    for i ∈ 1 .. n
        mx[1, i] ← 1
        mx
v :=
    for i ∈ 1 .. n
        v[1, i] ← 1
        v
ρ :=
    for i ∈ 1 .. n
        for j ∈ 1 .. n
            if i == j
                ρ[i, j] ← 1
                ρ
            else
                ρ[i, j] ← 0.5
                ρ
mx = [1, 1, 1]
ρ = [1, 0.5, 0.5; 0.5, 1, 0.5; 0.5, 0.5, 1]
v = [1, 1, 1]
Σ := ρ
Aofficial := [4, -2, 1; 2, 5, -1]
Σ = [1, 0.5, 0.5; 0.5, 1, 0.5; 0.5, 0.5, 1]
A := [4, -2, 1; 2, 5, -1]
I := [1, nint + 1, nint*2 + 1]
I = [1, 2, 3]
# ___ V[Y] and E[Y] __________________________________________________________
l := 1 .. 2
a ← sqrt(V)
V := A*Σ*transpose(A)
V = [15, 7.5; 7.5, 33]
mY := A*transpose(mx)
V = [15, 7.5; 7.5, 33]
mY = [3; 6]
V[1, 1] + V[2, 2] = 48
V = [15, 7.5; 7.5, 33]
# ____ Conditional Σ and mcond(x) _______________________________________________
Σcond1 :=
    k ← 1
    for j ∈ (1 .. n)
        for t ∈ (1 .. n)
            ΣΣ[t, j] ← Σ[t, j] - Σ[t, k]*Σ[k, j]/Σ[k, k]
    Σcond1 ← A*ΣΣ*transpose(A)
    Σcond1
Σcond3 :=
    k ← 3
    for j ∈ (1 .. n)
        for t ∈ (1 .. n)
            ΣΣ[t, j] ← Σ[t, j] - Σ[t, k]*Σ[k, j]/Σ[k, k]
    Σcond3 ← A*ΣΣ*transpose(A)
    Σcond3
Σcond2 :=
    k ← 2
    for j ∈ (1 .. n)
        for t ∈ (1 .. n)
            ΣΣ[t, j] ← Σ[t, j] - Σ[t, k]*Σ[k, j]/Σ[k, k]
    Σcond2 ← A*ΣΣ*transpose(A)
    Σcond2
Σcond1 = [2.75, -6.5; -6.5, 17]
Σcond2 = [14.75, 4.75; 4.75, 2.75]
Σcond3 = [11, 2.5; 2.5, 26.75]
Σcond3 = [11, 2.5; 2.5, 26.75]
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m11(x) := sum(A[1, j]*(mx[1, j] + (x - mx[1, j])*Σ[j, 1]/Σ[1, 1]), j = 1 .. n)
m12(x) := sum(A[2, j]*(mx[1, j] + (x - mx[1, j])*Σ[j, 1]/Σ[1, 1]), j = 1 .. n)
m22(x) := sum(A[2, j]*(mx[1, j] + (x - mx[1, j])*Σ[j, 2]/Σ[2, 2]), j = 1 .. n)
m21(x) := sum(A[1, j]*(mx[1, j] + (x - mx[1, j])*Σ[j, 2]/Σ[2, 2]), j = 1 .. n)
m31(x) := sum(A[1, j]*(mx[1, j] + (x - mx[1, j])*Σ[j, 3]/Σ[3, 3]), j = 1 .. n)
m32(x) := sum(A[2, j]*(mx[1, j] + (x - mx[1, j])*Σ[j, 3]/Σ[3, 3]), j = 1 .. n)
d := 2
cd := π^((d + 1)/2)/Γ((d + 1)/2)  # {\displaystyle e^{it\mu -{\frac {1}{2}}\sigma ^{2}t^{2}}}
cd = 6.28319
mYX1(x) := [m11(x), m12(x)]
ChY(t1, t2, mY, V) := e^(1i*(mY[1, 1]*t1 + mY[1, 2]*t2) - 1/2*[t1, t2]*V*[t1; t2])
ChYX1(t1, t2, x, Σcond1) := e^(1i*(m11(x)*t1 + m12(x)*t2) - 1/2*[t1, t2]*Σcond1*[t1; t2])
ChY(t1, t2, mY, V) := (cos(mY[1, 1]*t1 + mY[1, 2]*t2)*e^(-1/2*[t1, t2]*V*[t1; t2]) + 1i*sin(mY[1, 1]*t1 + mY[1, 2]*t2)*e^(-1/2*[t1, t2]*V*[t1; t2]))
ChYX1(t1, t2, x, Σcond1) := (cos(m11(x)*t1 + m12(x)*t2)*e^(-1/2*[t1, t2]*Σcond1*[t1; t2]) + 1i*sin(m11(x)*t1 + m12(x)*t2)*e^(-1/2*[t1, t2]*Σcond1*[t1; t2]))
Diff1(t1, t2, x) := (cos(mY[1, 1]*t1 + mY[1, 2]*t2)*e^(-1/2*[t1, t2]*V*[t1; t2]) - cos(m11(x)*t1 + m12(x)*t2)*e^(-1/2*[t1, t2]*Σcond1*[t1; t2])) + 1i*(sin(mY[1, 1]*t1 + mY[1, 2]*t2)*e^(-1/2*[t1, t2]*V*[t1; t2]) - sin(m11(x)*t1 + m12(x)*t2)*e^(-1/2*[t1, t2]*Σcond1*[t1; t2]))
Usef(t1, t2, x) := (cos(mY[1, 1]*t1 + mY[2, 1]*t2)*e^(-1/2*[t1, t2]*V*[t1; t2]) - cos(m11(x)*t1 + m12(x)*t2)*e^(-1/2*[t1, t2]*Σcond1*[t1; t2]))^2 + (sin(mY[1, 1]*t1 + mY[2, 1]*t2)*e^(-1/2*[t1, t2]*V*[t1; t2]) - sin(m11(x)*t1 + m12(x)*t2)*e^(-1/2*[t1, t2]*Σcond1*[t1; t2]))^2
Usef(1, 1, 1) = 0.00117088
W1inn(r) := 1/cd*integral(integral(Usef(t1, t2, r)/|t1^2 + t2^2|^((d + 1)/2), t1 = -10 .. 10), t2 = -10 .. 10)
W1inn(0.5) = 1.51426
ED1 := integral(W1inn(y)*1/(v[1, 1]*sqrt(2*π))*e^(-1/2*(y - mx[1, 1])^2/v[1, 1]^2), y = -10 .. 10)
ED1 = 3.47041
Usef2(t1, t2, x) := (cos(mY[1, 1]*t1 + mY[2, 1]*t2)*e^(-1/2*[t1, t2]*V*[t1; t2]) - cos(m21(x)*t1 + m22(x)*t2)*e^(-1/2*[t1, t2]*Σcond2*[t1; t2]))^2 + (sin(mY[1, 1]*t1 + mY[2, 1]*t2)*e^(-1/2*[t1, t2]*V*[t1; t2]) - sin(m21(x)*t1 + m22(x)*t2)*e^(-1/2*[t1, t2]*Σcond2*[t1; t2]))^2
Usef2(1, 1, 1) = 1.87953e-12
W2inn(r) := 1/cd*integral(integral(Usef2(t1, t2, r)/|t1^2 + t2^2|^((d + 1)/2), t1 = -5 .. 5), t2 = -5 .. 5)
W2inn(0.5) = 1.5558
ED2 := integral(W2inn(y)*1/(v[1, 1]*sqrt(2*π))*e^(-1/2*(y - mx[1, 1])^2/v[1, 1]^2), y = -5 .. 5)
ED2 = 3.62589
Usef3(t1, t2, x) := (cos(mY[1, 1]*t1 + mY[2, 1]*t2)*e^(-1/2*[t1, t2]*V*[t1; t2]) - cos(m31(x)*t1 + m32(x)*t2)*e^(-1/2*[t1, t2]*Σcond3*[t1; t2]))^2 + (sin(mY[1, 1]*t1 + mY[2, 1]*t2)*e^(-1/2*[t1, t2]*V*[t1; t2]) - sin(m31(x)*t1 + m32(x)*t2)*e^(-1/2*[t1, t2]*Σcond3*[t1; t2]))^2
Usef2(1, 1, 1) = 1.87953e-12
W3inn(r) := 1/cd*integral(integral(Usef3(t1, t2, r)/|t1^2 + t2^2|^((d + 1)/2), t1 = -5 .. 5), t2 = -5 .. 5)
W3inn(0.5) = 0.271335
ED3 := integral(W3inn(y)*1/(v[1, 1]*sqrt(2*π))*e^(-1/2*(y - mx[1, 1])^2/v[1, 1]^2), y = -5 .. 5)
ED3 = 0.942042
Diff1 = [Function: Diff1{VARIABLE}]
# [plot: W1inn(q), sqrt((mY[1, 1] - m11(q))^2 + (mY[2, 1] - m12(q))^2) vs q]
Diff2Aux2 := integral(Diff2Aux1(y)*(1/(v[1, 2]*sqrt(2*π))*e^(-1/2*(y - mx[1, 2])^2/v[1, 2]^2)), y = -∞ .. ∞)
Adv2 =  # error: This variable is undefined. Check that the label is set correctly.
Diff2 := Diff2Aux2/(2*(V[1, 1] + V[2, 2]))
Diff2 =  # error
Adv2 + Diff2 =  # error
Diff3Aux2 := integral(Diff3Aux1(y)*1/(v[1, 3]*sqrt(2*π))*e^(-1/2*(y - mx[1, 3])^2/v[1, 3]^2), y = -∞ .. ∞)
Adv3 =  # error
Diff3 := Diff3Aux2/(2*(V[1, 1] + V[2, 2]))
Diff3 =  # error
Adv3 + Diff3 =  # error
VY := V[1, 1] + V[2, 2]
iotaepsilon2 := OT1/(2*VY)
